# p - вероятность выпадения 1
# k - оценка вероятности выпадения 1
kk := -1/ln(2)
bestk1(p) := 0.5
# энтропия одного бита:
en(p) := -1/ln(2)*(p*ln(p) + (1 - p)*ln(1 - p))
2*p^2 - 2*p + 1
# энтропиия второго бита
en2(p, k) := kk*(((1 - p)^2 + p^2)*ln(k) + 2*p*(1 - p)*ln(1 - k))
# идеальное k для p, когда en2 = min;
bestk2(p) := p^2 + (1 - p)^2
# энтропия третьего бита
bestk3(p) := (p^3 + (1 - p)^3)/(p^2 + (1 - p)^2)
(3*p^2 - 3*p + 1)/(2*p^2 - 2*p + 1)
en3(p, k) := kk*((p^3 + (1 - p)^3)*ln(k) + p*(1 - p)*ln(1 - k) + 2*p*(1 - p)*ln(0.5))
en4(p, k, m) := kk*((p^4 + (1 - p)^4)*ln(k) + (p^3*(1 - p) + (1 - p)^3*p)*ln(1 - k) + 3*(p^3*(1 - p) + (1 - p)^3*p)*ln(m) + 6*p^2*(1 - p)^2*ln(1 - m))
bestk4(p) := (p^4 + (1 - p)^4)/(p^3 + (1 - p)^3)
ina := 0.01
i := ina, ina + 0.001 .. 1 - ina
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